// SBML level 2 version 3

model NKG2D()

  // Compartments:
  compartment Cyto = 1;
  compartment ExtrCel = 1;
  compartment Memb in ExtrCel = 1;  // 2-D

  // Species:
  species S1 in Memb = 8/Memb; S1 is "@Memb::NKG2D_Dap(D10_1a~U,D10_1b~U,D10_2a~U,D10_2b~U,Lig)";
  species S2 in Cyto = 30/Cyto; S2 is "@Cyto::Vav1_grb(Site0,Site1,Site2~U)";
  species S3 in Memb = 50/Memb; S3 is "@Memb::Lck(SH2!1,Tyr394~U,Tyr505~P!1)";
  species Memb_Lck_SH2_Tyr394_P_Tyr505_U in Memb = 50/Memb; Memb_Lck_SH2_Tyr394_P_Tyr505_U is "@Memb::Lck(SH2,Tyr394~P,Tyr505~U)";
  species Memb_Csk in Memb = 50/Memb; Memb_Csk is "@Memb::Csk()";
  species Memb_CD45 in Memb = 50/Memb; Memb_CD45 is "@Memb::CD45()";
  species Memb_Ligand_Site0 in Memb = 4/Memb; Memb_Ligand_Site0 is "@Memb::Ligand(Site0)";
  species Cyto_PI3K_Site0_Site1 in Cyto = 30/Cyto; Cyto_PI3K_Site0_Site1 is "@Cyto::PI3K(Site0,Site1)";
  species Memb_PLCgamma_Site0_Inact in Memb = 30/Memb; Memb_PLCgamma_Site0_Inact is "@Memb::PLCgamma(Site0~Inact)";
  species Cyto_Erk_Site0_U in Cyto = 50/Cyto; Cyto_Erk_Site0_U is "@Cyto::Erk(Site0~U)";
  species S11 in Memb = 0; S11 is "@Memb::Ligand(Site0!1).NKG2D_Dap(D10_1a~U,D10_1b~U,D10_2a~U,D10_2b~U,Lig!1)";
  species Memb_Lck_SH2_Tyr394_P_Tyr505_P in Memb = 0; Memb_Lck_SH2_Tyr394_P_Tyr505_P is "@Memb::Lck(SH2,Tyr394~P,Tyr505~P)";
  species Memb_Lck_SH2_Tyr394_U_Tyr505_U in Memb = 0; Memb_Lck_SH2_Tyr394_U_Tyr505_U is "@Memb::Lck(SH2,Tyr394~U,Tyr505~U)";
  species Memb_Lck_SH2_Tyr394_U_Tyr505_P in Memb = 0; Memb_Lck_SH2_Tyr394_U_Tyr505_P is "@Memb::Lck(SH2,Tyr394~U,Tyr505~P)";
  species S15 in Memb = 0; S15 is "@Memb::Ligand(Site0!1).NKG2D_Dap(D10_1a~P,D10_1b~U,D10_2a~U,D10_2b~U,Lig!1)";
  species S16 in Memb = 0; S16 is "@Memb::Ligand(Site0!1).NKG2D_Dap(D10_1a~U,D10_1b~P,D10_2a~U,D10_2b~U,Lig!1)";
  species S17 in Memb = 0; S17 is "@Memb::Ligand(Site0!1).NKG2D_Dap(D10_1a~U,D10_1b~U,D10_2a~P,D10_2b~U,Lig!1)";
  species S18 in Memb = 0; S18 is "@Memb::Ligand(Site0!1).NKG2D_Dap(D10_1a~U,D10_1b~U,D10_2a~U,D10_2b~P,Lig!1)";
  species Memb_Trans_Lig_D10 in Memb = 0; Memb_Trans_Lig_D10 is "@Memb::Trans_Lig_D10()";
  species S20 in Memb = 0; S20 is "@Memb::Lck(SH2!1,Tyr394~P,Tyr505~P!1)";
  species S21 in Memb = 0; S21 is "@Memb::NKG2D_Dap(D10_1a~P,D10_1b~U,D10_2a~U,D10_2b~U,Lig)";
  species S22 in Memb = 0; S22 is "@Memb::NKG2D_Dap(D10_1a~U,D10_1b~P,D10_2a~U,D10_2b~U,Lig)";
  species S23 in Memb = 0; S23 is "@Memb::NKG2D_Dap(D10_1a~U,D10_1b~U,D10_2a~P,D10_2b~U,Lig)";
  species S24 in Memb = 0; S24 is "@Memb::NKG2D_Dap(D10_1a~U,D10_1b~U,D10_2a~U,D10_2b~P,Lig)";
  species S25 in Memb = 0; S25 is "@Memb::Ligand(Site0!1).NKG2D_Dap(D10_1a~P,D10_1b~P,D10_2a~U,D10_2b~U,Lig!1)";
  species S26 in Memb = 0; S26 is "@Memb::Ligand(Site0!1).NKG2D_Dap(D10_1a~P,D10_1b~U,D10_2a~P,D10_2b~U,Lig!1)";
  species S27 in Memb = 0; S27 is "@Memb::Ligand(Site0!1).NKG2D_Dap(D10_1a~P,D10_1b~U,D10_2a~U,D10_2b~P,Lig!1)";
  species S28 in Memb = 0; S28 is "@Memb::Ligand(Site0!1).NKG2D_Dap(D10_1a~U,D10_1b~P,D10_2a~P,D10_2b~U,Lig!1)";
  species S29 in Memb = 0; S29 is "@Memb::Ligand(Site0!1).NKG2D_Dap(D10_1a~U,D10_1b~P,D10_2a~U,D10_2b~P,Lig!1)";
  species S30 in Memb = 0; S30 is "@Memb::Ligand(Site0!1).NKG2D_Dap(D10_1a~U,D10_1b~U,D10_2a~P,D10_2b~P,Lig!1)";
  species S31 in Memb = 0; S31 is "@Memb::NKG2D_Dap(D10_1a~P,D10_1b~P,D10_2a~U,D10_2b~U,Lig)";
  species S32 in Memb = 0; S32 is "@Memb::NKG2D_Dap(D10_1a~P,D10_1b~U,D10_2a~P,D10_2b~U,Lig)";
  species S33 in Memb = 0; S33 is "@Memb::NKG2D_Dap(D10_1a~P,D10_1b~U,D10_2a~U,D10_2b~P,Lig)";
  species S34 in Memb = 0; S34 is "@Memb::NKG2D_Dap(D10_1a~U,D10_1b~P,D10_2a~P,D10_2b~U,Lig)";
  species S35 in Memb = 0; S35 is "@Memb::NKG2D_Dap(D10_1a~U,D10_1b~P,D10_2a~U,D10_2b~P,Lig)";
  species S36 in Memb = 0; S36 is "@Memb::NKG2D_Dap(D10_1a~U,D10_1b~U,D10_2a~P,D10_2b~P,Lig)";
  species S37 in Memb = 0; S37 is "@Memb::Ligand(Site0!1).NKG2D_Dap(D10_1a~P,D10_1b~P,D10_2a~P,D10_2b~U,Lig!1)";
  species S38 in Memb = 0; S38 is "@Memb::Ligand(Site0!1).NKG2D_Dap(D10_1a~P,D10_1b~P,D10_2a~U,D10_2b~P,Lig!1)";
  species S39 in Memb = 0; S39 is "@Memb::Ligand(Site0!1).NKG2D_Dap(D10_1a~P,D10_1b~U,D10_2a~P,D10_2b~P,Lig!1)";
  species S40 in Memb = 0; S40 is "@Memb::Ligand(Site0!1).NKG2D_Dap(D10_1a~U,D10_1b~P,D10_2a~P,D10_2b~P,Lig!1)";
  species S41 in Memb = 0; S41 is "@Memb::NKG2D_Dap(D10_1a~P,D10_1b~P,D10_2a~P,D10_2b~U,Lig)";
  species S42 in Memb = 0; S42 is "@Memb::NKG2D_Dap(D10_1a~P,D10_1b~P,D10_2a~U,D10_2b~P,Lig)";
  species S43 in Memb = 0; S43 is "@Memb::NKG2D_Dap(D10_1a~P,D10_1b~U,D10_2a~P,D10_2b~P,Lig)";
  species S44 in Memb = 0; S44 is "@Memb::NKG2D_Dap(D10_1a~U,D10_1b~P,D10_2a~P,D10_2b~P,Lig)";
  species S45 in Memb = 0; S45 is "@Memb::Ligand(Site0!1).NKG2D_Dap(D10_1a~P,D10_1b~P,D10_2a~P,D10_2b~P,Lig!1)";
  species S46 in Memb = 0; S46 is "@Memb::NKG2D_Dap(D10_1a~P,D10_1b~P,D10_2a~P,D10_2b~P,Lig)";

  // Parameters:
  _rateLaw1 = 0.045;
  _rateLaw2 = 0.02;
  _rateLaw3 = 0.013;
  _rateLaw4 = 0.013;
  _rateLaw5 = 0.013;
  _rateLaw6 = 0.013;
  _rateLaw7 = 0.05;
  _rateLaw8 = 5.1;
  _rateLaw9 = 0.05;
  _rateLaw10 = 5.1;
  _rateLaw11 = 0.05;
  _rateLaw12 = 5.1;
  _rateLaw13 = 0.05;
  _rateLaw14 = 5.1;
  _rateLaw15 = 0.05;
  _rateLaw16 = 5.1;
  _rateLaw17 = 0.05;
  _rateLaw18 = 5.1;
  _rateLaw19 = 5;
  _rateLaw20 = 5;
  _rateLaw21 = 5;
  _rateLaw22 = 5;
  _rateLaw23 = 5;
  _rateLaw24 = 0.02;
  _rateLaw25 = 1000000;
  _rateLaw26 = 1000000;
  _rateLaw27 = 0.048;
  _rateLaw28 = 5;
  _rateLaw29 = 5;
  _rateLaw30 = 5;
  _rateLaw31 = 5;
  _rateLaw32 = 0.13;
  _rateLaw33 = 0.13;
  _rateLaw34 = 0.13;
  _rateLaw35 = 0.13;
  _rateLaw36 = 0.012;
  _rateLaw37 = 0.05;
  _rateLaw38 = 0.05;
  _rateLaw39 = 0.01;
  _rateLaw40 = 0.01;
  _rateLaw41 = 0.01;
  _rateLaw42 = 0.01;
  _rateLaw43 = 0.01;
  _rateLaw44 = 0;
  _rateLaw45 = 0;
  _rateLaw46 = 0.048;
  _rateLaw47 = 0.01;
  _rateLaw48 = 0.05;
  _rateLaw49 = 0.01;
  _rateLaw50 = 5.1;
  _rateLaw51 = 0.01;
  _rateLaw52 = 5.1;
  _rateLaw53 = 0.01;
  _rateLaw54 = 5.1;
  _rateLaw55 = 0.01;
  _rateLaw56 = 5.1;
  _rateLaw57 = 0.01;
  _rateLaw58 = 5.1;
  _rateLaw59 = 0.01;
  _rateLaw60 = 5.1;
  _rateLaw61 = 5;
  _rateLaw62 = 5;
  _rateLaw63 = 5;
  _rateLaw64 = 5;
  _rateLaw65 = 5;
  _rateLaw66 = 5;
  _rateLaw67 = 5;
  _rateLaw68 = 5;
  _rateLaw69 = 5;
  _rateLaw70 = 5;
  _rateLaw71 = 5;
  _rateLaw72 = 5;
  _rateLaw73 = 5;
  _rateLaw74 = 5;
  _rateLaw75 = 1000000;
  _rateLaw76 = 0.05;
  _rateLaw77 = 0.05;

  // Assignment rules:
  Ligand_Bound_Mmeb := S11 + S15 + S16 + S17 + S18 + S25 + S26 + S27 + S28 + S29 + S30 + S37 + S38 + S39 + S40 + S45;
  NKG2D_Dap_Bound := S11 + S15 + S16 + S17 + S18 + S25 + S26 + S27 + S28 + S29 + S30 + S37 + S38 + S39 + S40 + S45;
  Vav1_Memb := 0 + 0;
  Lck_memb_activ_half_or_full := Memb_Lck_SH2_Tyr394_P_Tyr505_U + Memb_Lck_SH2_Tyr394_P_Tyr505_P;
  Trans_Lig_D10 := 0 + Memb_Trans_Lig_D10;
  NKG2D_Dap_Unbound := S1 + S21 + S22 + S23 + S24 + S31 + S32 + S33 + S34 + S35 + S36 + S41 + S42 + S43 + S44 + S46;
  Vav1_Cyto := 0 + S2;
  Trans_Vav := 0 + 0;
  Ligand_Unbound_Cyto := 0 + Memb_Ligand_Site0;
  pVav1_Memb := 0 + 0;
  Lck_memb_inact := S3 + S20;
  pVav1_Cyto := 0 + 0;
  PI3K_active := 0 + 0;
  PLCgamma_active := 0 + 0;
  pErk_phos := 0 + 0;
  Trans_PI3K_tot := 0 + 0;

  // Reactions:
  R1: S1 + Memb_Ligand_Site0 => S11; _rateLaw1*S1*Memb_Ligand_Site0*Memb;
  R2: Memb_Lck_SH2_Tyr394_P_Tyr505_U + Memb_Csk => Memb_Csk + Memb_Lck_SH2_Tyr394_P_Tyr505_P; _rateLaw38*Memb_Lck_SH2_Tyr394_P_Tyr505_U*Memb_Csk*Memb;
  R3: S3 + Memb_CD45 => Memb_CD45 + Memb_Lck_SH2_Tyr394_U_Tyr505_U; _rateLaw39*S3*Memb_CD45*Memb;
  R4: Memb_Lck_SH2_Tyr394_P_Tyr505_U + Memb_CD45 => Memb_CD45 + Memb_Lck_SH2_Tyr394_U_Tyr505_U; _rateLaw40*Memb_Lck_SH2_Tyr394_P_Tyr505_U*Memb_CD45*Memb;
  R5: S3 => Memb_Lck_SH2_Tyr394_U_Tyr505_P; _rateLaw42*S3*Memb;
  R6: Memb_Lck_SH2_Tyr394_P_Tyr505_U => Memb_Lck_SH2_Tyr394_P_Tyr505_P; _rateLaw44*Memb_Lck_SH2_Tyr394_P_Tyr505_U*Memb;
  R7: S11 => S1 + Memb_Ligand_Site0; _rateLaw2*S11*Memb;
  R8: Memb_Lck_SH2_Tyr394_P_Tyr505_U + S11 => Memb_Lck_SH2_Tyr394_P_Tyr505_U + S15; _rateLaw3*Memb_Lck_SH2_Tyr394_P_Tyr505_U*S11*Memb;
  R9: S11 + Memb_Lck_SH2_Tyr394_P_Tyr505_P => Memb_Lck_SH2_Tyr394_P_Tyr505_P + S15; _rateLaw3*S11*Memb_Lck_SH2_Tyr394_P_Tyr505_P*Memb;
  R10: Memb_Lck_SH2_Tyr394_P_Tyr505_U + S11 => Memb_Lck_SH2_Tyr394_P_Tyr505_U + S16; _rateLaw4*Memb_Lck_SH2_Tyr394_P_Tyr505_U*S11*Memb;
  R11: S11 + Memb_Lck_SH2_Tyr394_P_Tyr505_P => Memb_Lck_SH2_Tyr394_P_Tyr505_P + S16; _rateLaw4*S11*Memb_Lck_SH2_Tyr394_P_Tyr505_P*Memb;
  R12: Memb_Lck_SH2_Tyr394_P_Tyr505_U + S11 => Memb_Lck_SH2_Tyr394_P_Tyr505_U + S17; _rateLaw5*Memb_Lck_SH2_Tyr394_P_Tyr505_U*S11*Memb;
  R13: S11 + Memb_Lck_SH2_Tyr394_P_Tyr505_P => Memb_Lck_SH2_Tyr394_P_Tyr505_P + S17; _rateLaw5*S11*Memb_Lck_SH2_Tyr394_P_Tyr505_P*Memb;
  R14: Memb_Lck_SH2_Tyr394_P_Tyr505_U + S11 => Memb_Lck_SH2_Tyr394_P_Tyr505_U + S18; _rateLaw6*Memb_Lck_SH2_Tyr394_P_Tyr505_U*S11*Memb;
  R15: S11 + Memb_Lck_SH2_Tyr394_P_Tyr505_P => Memb_Lck_SH2_Tyr394_P_Tyr505_P + S18; _rateLaw6*S11*Memb_Lck_SH2_Tyr394_P_Tyr505_P*Memb;
  R16: S11 => Memb_Trans_Lig_D10; _rateLaw24*S11*Memb;
  R17: Memb_Lck_SH2_Tyr394_P_Tyr505_U + Memb_Lck_SH2_Tyr394_U_Tyr505_U => Memb_Lck_SH2_Tyr394_P_Tyr505_U + Memb_Lck_SH2_Tyr394_P_Tyr505_U; _rateLaw37*Memb_Lck_SH2_Tyr394_P_Tyr505_U*Memb_Lck_SH2_Tyr394_U_Tyr505_U*Memb;
  R18: Memb_Lck_SH2_Tyr394_P_Tyr505_P + Memb_Lck_SH2_Tyr394_U_Tyr505_U => Memb_Lck_SH2_Tyr394_P_Tyr505_U + Memb_Lck_SH2_Tyr394_P_Tyr505_P; _rateLaw37*Memb_Lck_SH2_Tyr394_P_Tyr505_P*Memb_Lck_SH2_Tyr394_U_Tyr505_U*Memb;
  R19: Memb_Lck_SH2_Tyr394_P_Tyr505_U + Memb_Lck_SH2_Tyr394_U_Tyr505_P => Memb_Lck_SH2_Tyr394_P_Tyr505_U + Memb_Lck_SH2_Tyr394_P_Tyr505_P; _rateLaw37*Memb_Lck_SH2_Tyr394_P_Tyr505_U*Memb_Lck_SH2_Tyr394_U_Tyr505_P*Memb;
  R20: Memb_Lck_SH2_Tyr394_P_Tyr505_P + Memb_Lck_SH2_Tyr394_U_Tyr505_P => Memb_Lck_SH2_Tyr394_P_Tyr505_P + Memb_Lck_SH2_Tyr394_P_Tyr505_P; _rateLaw37*Memb_Lck_SH2_Tyr394_P_Tyr505_P*Memb_Lck_SH2_Tyr394_U_Tyr505_P*Memb;
  R21: Memb_Csk + Memb_Lck_SH2_Tyr394_U_Tyr505_U => Memb_Csk + Memb_Lck_SH2_Tyr394_U_Tyr505_P; _rateLaw38*Memb_Csk*Memb_Lck_SH2_Tyr394_U_Tyr505_U*Memb;
  R22: Memb_CD45 + Memb_Lck_SH2_Tyr394_P_Tyr505_P => Memb_CD45 + Memb_Lck_SH2_Tyr394_U_Tyr505_P; _rateLaw40*Memb_CD45*Memb_Lck_SH2_Tyr394_P_Tyr505_P*Memb;
  R23: Memb_Lck_SH2_Tyr394_P_Tyr505_P => S20; _rateLaw41*Memb_Lck_SH2_Tyr394_P_Tyr505_P*Memb;
  R24: Memb_Lck_SH2_Tyr394_U_Tyr505_P => S3; _rateLaw41*Memb_Lck_SH2_Tyr394_U_Tyr505_P*Memb;
  R25: Memb_CD45 + Memb_Lck_SH2_Tyr394_P_Tyr505_P => Memb_Lck_SH2_Tyr394_P_Tyr505_U + Memb_CD45; _rateLaw43*Memb_CD45*Memb_Lck_SH2_Tyr394_P_Tyr505_P*Memb;
  R26: Memb_CD45 + Memb_Lck_SH2_Tyr394_U_Tyr505_P => Memb_CD45 + Memb_Lck_SH2_Tyr394_U_Tyr505_U; _rateLaw43*Memb_CD45*Memb_Lck_SH2_Tyr394_U_Tyr505_P*Memb;
  R27: Memb_Lck_SH2_Tyr394_U_Tyr505_U => Memb_Lck_SH2_Tyr394_U_Tyr505_P; _rateLaw44*Memb_Lck_SH2_Tyr394_U_Tyr505_U*Memb;
  R28: Memb_Lck_SH2_Tyr394_P_Tyr505_P => Memb_Lck_SH2_Tyr394_P_Tyr505_U; _rateLaw45*Memb_Lck_SH2_Tyr394_P_Tyr505_P*Memb;
  R29: Memb_Lck_SH2_Tyr394_U_Tyr505_P => Memb_Lck_SH2_Tyr394_U_Tyr505_U; _rateLaw45*Memb_Lck_SH2_Tyr394_U_Tyr505_P*Memb;
  R30: S15 => Memb_Ligand_Site0 + S21; _rateLaw2*S15*Memb;
  R31: S16 => Memb_Ligand_Site0 + S22; _rateLaw2*S16*Memb;
  R32: S17 => Memb_Ligand_Site0 + S23; _rateLaw2*S17*Memb;
  R33: S18 => Memb_Ligand_Site0 + S24; _rateLaw2*S18*Memb;
  R34: Memb_Lck_SH2_Tyr394_P_Tyr505_U + S16 => Memb_Lck_SH2_Tyr394_P_Tyr505_U + S25; _rateLaw3*Memb_Lck_SH2_Tyr394_P_Tyr505_U*S16*Memb;
  R35: Memb_Lck_SH2_Tyr394_P_Tyr505_P + S16 => Memb_Lck_SH2_Tyr394_P_Tyr505_P + S25; _rateLaw3*Memb_Lck_SH2_Tyr394_P_Tyr505_P*S16*Memb;
  R36: Memb_Lck_SH2_Tyr394_P_Tyr505_U + S17 => Memb_Lck_SH2_Tyr394_P_Tyr505_U + S26; _rateLaw3*Memb_Lck_SH2_Tyr394_P_Tyr505_U*S17*Memb;
  R37: Memb_Lck_SH2_Tyr394_P_Tyr505_P + S17 => Memb_Lck_SH2_Tyr394_P_Tyr505_P + S26; _rateLaw3*Memb_Lck_SH2_Tyr394_P_Tyr505_P*S17*Memb;
  R38: Memb_Lck_SH2_Tyr394_P_Tyr505_U + S18 => Memb_Lck_SH2_Tyr394_P_Tyr505_U + S27; _rateLaw3*Memb_Lck_SH2_Tyr394_P_Tyr505_U*S18*Memb;
  R39: Memb_Lck_SH2_Tyr394_P_Tyr505_P + S18 => Memb_Lck_SH2_Tyr394_P_Tyr505_P + S27; _rateLaw3*Memb_Lck_SH2_Tyr394_P_Tyr505_P*S18*Memb;
  R40: Memb_Lck_SH2_Tyr394_P_Tyr505_U + S15 => Memb_Lck_SH2_Tyr394_P_Tyr505_U + S25; _rateLaw4*Memb_Lck_SH2_Tyr394_P_Tyr505_U*S15*Memb;
  R41: Memb_Lck_SH2_Tyr394_P_Tyr505_P + S15 => Memb_Lck_SH2_Tyr394_P_Tyr505_P + S25; _rateLaw4*Memb_Lck_SH2_Tyr394_P_Tyr505_P*S15*Memb;
  R42: Memb_Lck_SH2_Tyr394_P_Tyr505_U + S17 => Memb_Lck_SH2_Tyr394_P_Tyr505_U + S28; _rateLaw4*Memb_Lck_SH2_Tyr394_P_Tyr505_U*S17*Memb;
  R43: Memb_Lck_SH2_Tyr394_P_Tyr505_P + S17 => Memb_Lck_SH2_Tyr394_P_Tyr505_P + S28; _rateLaw4*Memb_Lck_SH2_Tyr394_P_Tyr505_P*S17*Memb;
  R44: Memb_Lck_SH2_Tyr394_P_Tyr505_U + S18 => Memb_Lck_SH2_Tyr394_P_Tyr505_U + S29; _rateLaw4*Memb_Lck_SH2_Tyr394_P_Tyr505_U*S18*Memb;
  R45: Memb_Lck_SH2_Tyr394_P_Tyr505_P + S18 => Memb_Lck_SH2_Tyr394_P_Tyr505_P + S29; _rateLaw4*Memb_Lck_SH2_Tyr394_P_Tyr505_P*S18*Memb;
  R46: Memb_Lck_SH2_Tyr394_P_Tyr505_U + S15 => Memb_Lck_SH2_Tyr394_P_Tyr505_U + S26; _rateLaw5*Memb_Lck_SH2_Tyr394_P_Tyr505_U*S15*Memb;
  R47: Memb_Lck_SH2_Tyr394_P_Tyr505_P + S15 => Memb_Lck_SH2_Tyr394_P_Tyr505_P + S26; _rateLaw5*Memb_Lck_SH2_Tyr394_P_Tyr505_P*S15*Memb;
  R48: Memb_Lck_SH2_Tyr394_P_Tyr505_U + S16 => Memb_Lck_SH2_Tyr394_P_Tyr505_U + S28; _rateLaw5*Memb_Lck_SH2_Tyr394_P_Tyr505_U*S16*Memb;
  R49: Memb_Lck_SH2_Tyr394_P_Tyr505_P + S16 => Memb_Lck_SH2_Tyr394_P_Tyr505_P + S28; _rateLaw5*Memb_Lck_SH2_Tyr394_P_Tyr505_P*S16*Memb;
  R50: Memb_Lck_SH2_Tyr394_P_Tyr505_U + S18 => Memb_Lck_SH2_Tyr394_P_Tyr505_U + S30; _rateLaw5*Memb_Lck_SH2_Tyr394_P_Tyr505_U*S18*Memb;
  R51: Memb_Lck_SH2_Tyr394_P_Tyr505_P + S18 => Memb_Lck_SH2_Tyr394_P_Tyr505_P + S30; _rateLaw5*Memb_Lck_SH2_Tyr394_P_Tyr505_P*S18*Memb;
  R52: Memb_Lck_SH2_Tyr394_P_Tyr505_U + S15 => Memb_Lck_SH2_Tyr394_P_Tyr505_U + S27; _rateLaw6*Memb_Lck_SH2_Tyr394_P_Tyr505_U*S15*Memb;
  R53: Memb_Lck_SH2_Tyr394_P_Tyr505_P + S15 => Memb_Lck_SH2_Tyr394_P_Tyr505_P + S27; _rateLaw6*Memb_Lck_SH2_Tyr394_P_Tyr505_P*S15*Memb;
  R54: Memb_Lck_SH2_Tyr394_P_Tyr505_U + S16 => Memb_Lck_SH2_Tyr394_P_Tyr505_U + S29; _rateLaw6*Memb_Lck_SH2_Tyr394_P_Tyr505_U*S16*Memb;
  R55: Memb_Lck_SH2_Tyr394_P_Tyr505_P + S16 => Memb_Lck_SH2_Tyr394_P_Tyr505_P + S29; _rateLaw6*Memb_Lck_SH2_Tyr394_P_Tyr505_P*S16*Memb;
  R56: Memb_Lck_SH2_Tyr394_P_Tyr505_U + S17 => Memb_Lck_SH2_Tyr394_P_Tyr505_U + S30; _rateLaw6*Memb_Lck_SH2_Tyr394_P_Tyr505_U*S17*Memb;
  R57: Memb_Lck_SH2_Tyr394_P_Tyr505_P + S17 => Memb_Lck_SH2_Tyr394_P_Tyr505_P + S30; _rateLaw6*Memb_Lck_SH2_Tyr394_P_Tyr505_P*S17*Memb;
  R58: S15 => Memb_Trans_Lig_D10; _rateLaw24*S15*Memb;
  R59: S16 => Memb_Trans_Lig_D10; _rateLaw24*S16*Memb;
  R60: S17 => Memb_Trans_Lig_D10; _rateLaw24*S17*Memb;
  R61: S18 => Memb_Trans_Lig_D10; _rateLaw24*S18*Memb;
  R62: Memb_Trans_Lig_D10 => S1 + Memb_Ligand_Site0; _rateLaw25*Memb_Trans_Lig_D10*Memb;
  R63: S15 => S11; _rateLaw32*S15*Memb;
  R64: S16 => S11; _rateLaw33*S16*Memb;
  R65: S17 => S11; _rateLaw34*S17*Memb;
  R66: S18 => S11; _rateLaw35*S18*Memb;
  R67: Memb_CD45 + S20 => Memb_Lck_SH2_Tyr394_P_Tyr505_U + Memb_CD45; _rateLaw39*Memb_CD45*S20*Memb;
  R68: S20 => Memb_Lck_SH2_Tyr394_P_Tyr505_P; _rateLaw42*S20*Memb;
  R69: Memb_Ligand_Site0 + S21 => S15; _rateLaw1*Memb_Ligand_Site0*S21*Memb;
  R70: Memb_Ligand_Site0 + S22 => S16; _rateLaw1*Memb_Ligand_Site0*S22*Memb;
  R71: Memb_Ligand_Site0 + S23 => S17; _rateLaw1*Memb_Ligand_Site0*S23*Memb;
  R72: Memb_Ligand_Site0 + S24 => S18; _rateLaw1*Memb_Ligand_Site0*S24*Memb;
  R73: S25 => Memb_Ligand_Site0 + S31; _rateLaw2*S25*Memb;
  R74: S26 => Memb_Ligand_Site0 + S32; _rateLaw2*S26*Memb;
  R75: S27 => Memb_Ligand_Site0 + S33; _rateLaw2*S27*Memb;
  R76: S28 => Memb_Ligand_Site0 + S34; _rateLaw2*S28*Memb;
  R77: S29 => Memb_Ligand_Site0 + S35; _rateLaw2*S29*Memb;
  R78: S30 => Memb_Ligand_Site0 + S36; _rateLaw2*S30*Memb;
  R79: Memb_Lck_SH2_Tyr394_P_Tyr505_U + S28 => Memb_Lck_SH2_Tyr394_P_Tyr505_U + S37; _rateLaw3*Memb_Lck_SH2_Tyr394_P_Tyr505_U*S28*Memb;
  R80: Memb_Lck_SH2_Tyr394_P_Tyr505_P + S28 => Memb_Lck_SH2_Tyr394_P_Tyr505_P + S37; _rateLaw3*Memb_Lck_SH2_Tyr394_P_Tyr505_P*S28*Memb;
  R81: Memb_Lck_SH2_Tyr394_P_Tyr505_U + S29 => Memb_Lck_SH2_Tyr394_P_Tyr505_U + S38; _rateLaw3*Memb_Lck_SH2_Tyr394_P_Tyr505_U*S29*Memb;
  R82: Memb_Lck_SH2_Tyr394_P_Tyr505_P + S29 => Memb_Lck_SH2_Tyr394_P_Tyr505_P + S38; _rateLaw3*Memb_Lck_SH2_Tyr394_P_Tyr505_P*S29*Memb;
  R83: Memb_Lck_SH2_Tyr394_P_Tyr505_U + S30 => Memb_Lck_SH2_Tyr394_P_Tyr505_U + S39; _rateLaw3*Memb_Lck_SH2_Tyr394_P_Tyr505_U*S30*Memb;
  R84: Memb_Lck_SH2_Tyr394_P_Tyr505_P + S30 => Memb_Lck_SH2_Tyr394_P_Tyr505_P + S39; _rateLaw3*Memb_Lck_SH2_Tyr394_P_Tyr505_P*S30*Memb;
  R85: Memb_Lck_SH2_Tyr394_P_Tyr505_U + S26 => Memb_Lck_SH2_Tyr394_P_Tyr505_U + S37; _rateLaw4*Memb_Lck_SH2_Tyr394_P_Tyr505_U*S26*Memb;
  R86: Memb_Lck_SH2_Tyr394_P_Tyr505_P + S26 => Memb_Lck_SH2_Tyr394_P_Tyr505_P + S37; _rateLaw4*Memb_Lck_SH2_Tyr394_P_Tyr505_P*S26*Memb;
  R87: Memb_Lck_SH2_Tyr394_P_Tyr505_U + S27 => Memb_Lck_SH2_Tyr394_P_Tyr505_U + S38; _rateLaw4*Memb_Lck_SH2_Tyr394_P_Tyr505_U*S27*Memb;
  R88: Memb_Lck_SH2_Tyr394_P_Tyr505_P + S27 => Memb_Lck_SH2_Tyr394_P_Tyr505_P + S38; _rateLaw4*Memb_Lck_SH2_Tyr394_P_Tyr505_P*S27*Memb;
  R89: Memb_Lck_SH2_Tyr394_P_Tyr505_U + S30 => Memb_Lck_SH2_Tyr394_P_Tyr505_U + S40; _rateLaw4*Memb_Lck_SH2_Tyr394_P_Tyr505_U*S30*Memb;
  R90: Memb_Lck_SH2_Tyr394_P_Tyr505_P + S30 => Memb_Lck_SH2_Tyr394_P_Tyr505_P + S40; _rateLaw4*Memb_Lck_SH2_Tyr394_P_Tyr505_P*S30*Memb;
  R91: Memb_Lck_SH2_Tyr394_P_Tyr505_U + S25 => Memb_Lck_SH2_Tyr394_P_Tyr505_U + S37; _rateLaw5*Memb_Lck_SH2_Tyr394_P_Tyr505_U*S25*Memb;
  R92: Memb_Lck_SH2_Tyr394_P_Tyr505_P + S25 => Memb_Lck_SH2_Tyr394_P_Tyr505_P + S37; _rateLaw5*Memb_Lck_SH2_Tyr394_P_Tyr505_P*S25*Memb;
  R93: Memb_Lck_SH2_Tyr394_P_Tyr505_U + S27 => Memb_Lck_SH2_Tyr394_P_Tyr505_U + S39; _rateLaw5*Memb_Lck_SH2_Tyr394_P_Tyr505_U*S27*Memb;
  R94: Memb_Lck_SH2_Tyr394_P_Tyr505_P + S27 => Memb_Lck_SH2_Tyr394_P_Tyr505_P + S39; _rateLaw5*Memb_Lck_SH2_Tyr394_P_Tyr505_P*S27*Memb;
  R95: Memb_Lck_SH2_Tyr394_P_Tyr505_U + S29 => Memb_Lck_SH2_Tyr394_P_Tyr505_U + S40; _rateLaw5*Memb_Lck_SH2_Tyr394_P_Tyr505_U*S29*Memb;
  R96: Memb_Lck_SH2_Tyr394_P_Tyr505_P + S29 => Memb_Lck_SH2_Tyr394_P_Tyr505_P + S40; _rateLaw5*Memb_Lck_SH2_Tyr394_P_Tyr505_P*S29*Memb;
  R97: Memb_Lck_SH2_Tyr394_P_Tyr505_U + S25 => Memb_Lck_SH2_Tyr394_P_Tyr505_U + S38; _rateLaw6*Memb_Lck_SH2_Tyr394_P_Tyr505_U*S25*Memb;
  R98: Memb_Lck_SH2_Tyr394_P_Tyr505_P + S25 => Memb_Lck_SH2_Tyr394_P_Tyr505_P + S38; _rateLaw6*Memb_Lck_SH2_Tyr394_P_Tyr505_P*S25*Memb;
  R99: Memb_Lck_SH2_Tyr394_P_Tyr505_U + S26 => Memb_Lck_SH2_Tyr394_P_Tyr505_U + S39; _rateLaw6*Memb_Lck_SH2_Tyr394_P_Tyr505_U*S26*Memb;
  R100: Memb_Lck_SH2_Tyr394_P_Tyr505_P + S26 => Memb_Lck_SH2_Tyr394_P_Tyr505_P + S39; _rateLaw6*Memb_Lck_SH2_Tyr394_P_Tyr505_P*S26*Memb;
  R101: Memb_Lck_SH2_Tyr394_P_Tyr505_U + S28 => Memb_Lck_SH2_Tyr394_P_Tyr505_U + S40; _rateLaw6*Memb_Lck_SH2_Tyr394_P_Tyr505_U*S28*Memb;
  R102: Memb_Lck_SH2_Tyr394_P_Tyr505_P + S28 => Memb_Lck_SH2_Tyr394_P_Tyr505_P + S40; _rateLaw6*Memb_Lck_SH2_Tyr394_P_Tyr505_P*S28*Memb;
  R103: S25 => Memb_Trans_Lig_D10; _rateLaw24*S25*Memb;
  R104: S26 => Memb_Trans_Lig_D10; _rateLaw24*S26*Memb;
  R105: S27 => Memb_Trans_Lig_D10; _rateLaw24*S27*Memb;
  R106: S28 => Memb_Trans_Lig_D10; _rateLaw24*S28*Memb;
  R107: S29 => Memb_Trans_Lig_D10; _rateLaw24*S29*Memb;
  R108: S30 => Memb_Trans_Lig_D10; _rateLaw24*S30*Memb;
  R109: S25 => S16; _rateLaw32*S25*Memb;
  R110: S26 => S17; _rateLaw32*S26*Memb;
  R111: S27 => S18; _rateLaw32*S27*Memb;
  R112: S25 => S15; _rateLaw33*S25*Memb;
  R113: S28 => S17; _rateLaw33*S28*Memb;
  R114: S29 => S18; _rateLaw33*S29*Memb;
  R115: S26 => S15; _rateLaw34*S26*Memb;
  R116: S28 => S16; _rateLaw34*S28*Memb;
  R117: S30 => S18; _rateLaw34*S30*Memb;
  R118: S27 => S15; _rateLaw35*S27*Memb;
  R119: S29 => S16; _rateLaw35*S29*Memb;
  R120: S30 => S17; _rateLaw35*S30*Memb;
  R121: Memb_Ligand_Site0 + S31 => S25; _rateLaw1*Memb_Ligand_Site0*S31*Memb;
  R122: Memb_Ligand_Site0 + S32 => S26; _rateLaw1*Memb_Ligand_Site0*S32*Memb;
  R123: Memb_Ligand_Site0 + S33 => S27; _rateLaw1*Memb_Ligand_Site0*S33*Memb;
  R124: Memb_Ligand_Site0 + S34 => S28; _rateLaw1*Memb_Ligand_Site0*S34*Memb;
  R125: Memb_Ligand_Site0 + S35 => S29; _rateLaw1*Memb_Ligand_Site0*S35*Memb;
  R126: Memb_Ligand_Site0 + S36 => S30; _rateLaw1*Memb_Ligand_Site0*S36*Memb;
  R127: S37 => Memb_Ligand_Site0 + S41; _rateLaw2*S37*Memb;
  R128: S38 => Memb_Ligand_Site0 + S42; _rateLaw2*S38*Memb;
  R129: S39 => Memb_Ligand_Site0 + S43; _rateLaw2*S39*Memb;
  R130: S40 => Memb_Ligand_Site0 + S44; _rateLaw2*S40*Memb;
  R131: Memb_Lck_SH2_Tyr394_P_Tyr505_U + S40 => Memb_Lck_SH2_Tyr394_P_Tyr505_U + S45; _rateLaw3*Memb_Lck_SH2_Tyr394_P_Tyr505_U*S40*Memb;
  R132: Memb_Lck_SH2_Tyr394_P_Tyr505_P + S40 => Memb_Lck_SH2_Tyr394_P_Tyr505_P + S45; _rateLaw3*Memb_Lck_SH2_Tyr394_P_Tyr505_P*S40*Memb;
  R133: Memb_Lck_SH2_Tyr394_P_Tyr505_U + S39 => Memb_Lck_SH2_Tyr394_P_Tyr505_U + S45; _rateLaw4*Memb_Lck_SH2_Tyr394_P_Tyr505_U*S39*Memb;
  R134: Memb_Lck_SH2_Tyr394_P_Tyr505_P + S39 => Memb_Lck_SH2_Tyr394_P_Tyr505_P + S45; _rateLaw4*Memb_Lck_SH2_Tyr394_P_Tyr505_P*S39*Memb;
  R135: Memb_Lck_SH2_Tyr394_P_Tyr505_U + S38 => Memb_Lck_SH2_Tyr394_P_Tyr505_U + S45; _rateLaw5*Memb_Lck_SH2_Tyr394_P_Tyr505_U*S38*Memb;
  R136: Memb_Lck_SH2_Tyr394_P_Tyr505_P + S38 => Memb_Lck_SH2_Tyr394_P_Tyr505_P + S45; _rateLaw5*Memb_Lck_SH2_Tyr394_P_Tyr505_P*S38*Memb;
  R137: Memb_Lck_SH2_Tyr394_P_Tyr505_U + S37 => Memb_Lck_SH2_Tyr394_P_Tyr505_U + S45; _rateLaw6*Memb_Lck_SH2_Tyr394_P_Tyr505_U*S37*Memb;
  R138: Memb_Lck_SH2_Tyr394_P_Tyr505_P + S37 => Memb_Lck_SH2_Tyr394_P_Tyr505_P + S45; _rateLaw6*Memb_Lck_SH2_Tyr394_P_Tyr505_P*S37*Memb;
  R139: S37 => Memb_Trans_Lig_D10; _rateLaw24*S37*Memb;
  R140: S38 => Memb_Trans_Lig_D10; _rateLaw24*S38*Memb;
  R141: S39 => Memb_Trans_Lig_D10; _rateLaw24*S39*Memb;
  R142: S40 => Memb_Trans_Lig_D10; _rateLaw24*S40*Memb;
  R143: S37 => S28; _rateLaw32*S37*Memb;
  R144: S38 => S29; _rateLaw32*S38*Memb;
  R145: S39 => S30; _rateLaw32*S39*Memb;
  R146: S37 => S26; _rateLaw33*S37*Memb;
  R147: S38 => S27; _rateLaw33*S38*Memb;
  R148: S40 => S30; _rateLaw33*S40*Memb;
  R149: S37 => S25; _rateLaw34*S37*Memb;
  R150: S39 => S27; _rateLaw34*S39*Memb;
  R151: S40 => S29; _rateLaw34*S40*Memb;
  R152: S38 => S25; _rateLaw35*S38*Memb;
  R153: S39 => S26; _rateLaw35*S39*Memb;
  R154: S40 => S28; _rateLaw35*S40*Memb;
  R155: Memb_Ligand_Site0 + S41 => S37; _rateLaw1*Memb_Ligand_Site0*S41*Memb;
  R156: Memb_Ligand_Site0 + S42 => S38; _rateLaw1*Memb_Ligand_Site0*S42*Memb;
  R157: Memb_Ligand_Site0 + S43 => S39; _rateLaw1*Memb_Ligand_Site0*S43*Memb;
  R158: Memb_Ligand_Site0 + S44 => S40; _rateLaw1*Memb_Ligand_Site0*S44*Memb;
  R159: S45 => Memb_Ligand_Site0 + S46; _rateLaw2*S45*Memb;
  R160: S45 => Memb_Trans_Lig_D10; _rateLaw24*S45*Memb;
  R161: S45 => S40; _rateLaw32*S45*Memb;
  R162: S45 => S39; _rateLaw33*S45*Memb;
  R163: S45 => S38; _rateLaw34*S45*Memb;
  R164: S45 => S37; _rateLaw35*S45*Memb;
  R165: Memb_Ligand_Site0 + S46 => S45; _rateLaw1*Memb_Ligand_Site0*S46*Memb;

  // Unit definitions:
  unit substance = item;
end
